#####################################################
# Stage 2: Extra equilibration run                  #
# Version:Jun-04-2020                               #
#####################################################


# Initialization
units		lj
boundary	p p f
atom_style	full
log 		log.txt
read_restart	restart1

# Neighbor information
neighbor        1.0 bin
neigh_modify	every 1 delay 1 one 10000

# Pair Information
bond_style	fene
special_bonds   fene
bond_coeff	1 30 1.6 1.5 1

angle_style     cosine
angle_coeff     1 3

dihedral_style	none
improper_style 	none

pair_style      lj/cut/coul/long 1.122462 10.0
pair_modify     shift yes
pair_coeff	* * 1 1
kspace_style	pppm 0.00001
kspace_modify   slab 3.0
dielectric		1

# Define Groups
group bottom_atoms type 1
group not_bottom subtract all bottom_atoms

#####################################################
# Equilibration (Langevin dynamics at kT=1)
#####################################################

# Initiate/Write Atoms and Other Details
variable        ts equal step
velocity        all set 0.0 0.0 0.0
velocity        not_bottom create 1 1231 mom yes
write_data      init_config.data
thermo_style	custom step temp pe
thermo          10000
dump            main all custom 10000 config_${ts}.lammpstrj id type xu yu zu

# Main Fixes
fix  wallhi   all wall/lj126 zhi  EDGE 0.5 0.5 0.56123
fix  walllow  all wall/lj126 zlo  EDGE 0.5 0.5 0.56123
fix  2 not_bottom langevin 1 1 6.99 904297
fix  freeze bottom_atoms setforce NULL NULL 0.0
fix  1 all nve

# Run Styles
run_style verlet
restart   5000 restart1 restart2
restart   500000 archival_*.restart
timestep  0.001
run	  5000000
timestep  0.003
run	  5000000
unfix 1
unfix 2
write_restart 	restart.fene
